*Heading
** Job name: unnamed-711 Model name: Model-1
** Generated by: Abaqus/CAE 2020
*Preprint, echo=NO, model=NO, history=NO, contact=NO
**
** PARTS
**
*Part, name="main reentrant2d structure"
*Node
      1,   95.0723343,   23.3936272
      2,   95.0723343,   43.3936272
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*Element, type=CPE4H
  1, 2568, 2389,  514,  515
  2,  513,  514, 2389, 2453
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*Nset, nset=_PickedSet2, internal, generate
    1,  4977,     1
*Elset, elset=_PickedSet2, internal, generate
    1,  3911,     1
*Nset, nset=LD-Edge-1
   22,   23,   99,  374,  375,  376
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*Elset, elset=LD-Edge-1
  185,  189,  192,  197,  405,  412
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*Nset, nset=LD-Edge-2
  135,  136,  199, 1369, 1370, 1371
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*Elset, elset=LD-Edge-2
 2137, 2170, 2171, 2178, 2181, 2185
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*Nset, nset=TD-Edge-1
   99,  100,  103,  104,  105,  109
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*Elset, elset=TD-Edge-1
 1088, 1089, 1304, 1309, 1386, 1393
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*Nset, nset=TD-Edge-2
    4,    5,    6,   10,   11,   12
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*Elset, elset=TD-Edge-2
   45,   46,  121,  122,  172,  185
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*Nset, nset=Mid-Vertice-1
 88,
*Nset, nset=Mid-Vertice-2
 2,
** Section: section
*Solid Section, elset=_PickedSet2, material=material
1.,
*End Part
**
**
** ASSEMBLY
**
*Assembly, name=Assembly
**
*Instance, name="main reentrant2d structure-1", part="main reentrant2d structure"
*End Instance
**
*Node
      1,           0.,   22.2624187,           0.
*Node
      2,   190.144669,   22.2624187,           0.
*Nset, nset=RP-1-set
 1,
*Nset, nset=RP-2-set
 2,
** Constraint: RP-1-eq-x
*Equation
2
"main reentrant2d structure-1".LD-Edge-1, 1, 1.
RP-1-set, 1, -1.
** Constraint: RP-1-eq-y
*Equation
2
"main reentrant2d structure-1".LD-Edge-1, 2, 1.
RP-1-set, 2, -1.
** Constraint: RP-2-eq-x
*Equation
2
"main reentrant2d structure-1".LD-Edge-2, 1, 1.
RP-2-set, 1, -1.
*End Assembly
**
** MATERIALS
**
*Material, name=material
*Density
 0.001122,
*Elastic
51., 0.48
**
** BOUNDARY CONDITIONS
**
** Name: Fixed-BC Type: Symmetry/Antisymmetry/Encastre
*Boundary
RP-1-set, ENCASTRE
** ----------------------------------------------------------------
**
** STEP: Step-1
**
*Step, name=Step-1, nlgeom=YES, inc=1000000
*Static
0.1, 1., 1e-10, 0.1
**
** BOUNDARY CONDITIONS
**
** Name: UM-Disp-BC Type: Displacement/Rotation
*Boundary
RP-2-set, 1, 1, 20.
**
** OUTPUT REQUESTS
**
*Restart, write, frequency=0
**
** FIELD OUTPUT: F-Output-1
**
*Output, field, variable=PRESELECT
**
** HISTORY OUTPUT: H-Output-1
**
*Output, history, variable=PRESELECT
*End Step
